ADC_ref := 3.3 V
PGA := 8
R_1 := 1500 Ω
R_2 := 22000 Ω
R_3 := 2200 Ω
G := 1/(R_1*(1/R_1 + 1/R_2 + 1/R_3))*PGA = 4.57143
V_offset := ADC_ref/(R_2*(1/R_1 + 1/R_2 + 1/R_3))*PGA = 1.02857 V
R_sense := 0.015 Ω  # OBS. This has been changed from the original 3 mOhm sense resistor
I := 14 A
V_sense := I*R_sense = 210 mV
V_ADC_range := G*V_sense = 0.96 V
R_sense*I^2 = 2.94 W
V_ADC_input_max := V_offset + V_ADC_range = 1.98857 V
ADC_res := 2^12 - 1 = 4095
ADC_meas := V_ADC_range/ADC_ref*ADC_res = 1191.27
I_res := ADC_meas/I = 0.0850909 1/mA
I_prADCstep := I/ADC_meas = 11.7521 mA
ADC_v_to_I_sense := 1/(R_sense*G) = 14.5833 1/Ω
I := 2.79 A
U := 8.883 V
8.75 V/(2.7 Ω) = 3.24074 A
ADC_v_to_I_sense*75*mV = 1.09375 A
R := U/I = 3.18387 Ω
9 V/(I_prADCstep*75) = 10.2109 Ω
75 mV/(3.3 V)*4096 = 93.0909
I := 1.5 A
U := 9 V
90/4095*3.3*V = 72.5275 mV
R := U/I = 6 Ω
I_prADCstep*4 = 0.0470085 A
ADC_Vin := 1073
ADC_Vin/4095*3.3*V*(18 kΩ/(169 kΩ + 18 kΩ))^-1 = 8.98315 V
